// COMSOL Multiphysics 6.1.0.252 model "Slope.mph"
// Outline of the model tree

Parameters
  epsilon = 0.05
  kappa = 0.1
  lamda = 10
  cosTheta = 0.998630  // 3 deg
  sinTheta = 0.052336
  tanTheta = 0.052408

Functions
  an1: Analytic "matrix" | funcname = hm0; expr = 1-tanTheta*x
  an2: Analytic "fracture" | funcname = hf0; expr = 1-tanTheta*x

Geometry
  geom1 "Geometry 1" (1D, length unit m)
    i1: Interval | p2 = 40
    fin: Finalize "Form Union"

Physics
  g: GeneralFormPDE on all domains
    dependent variable h = {hf, hm}
    gfeq1: GeneralFormPDE (default)
      f = {sinTheta*hfx+kappa*cosTheta*(hm^2-hf^2)/2, -kappa*cosTheta*(hm^2-hf^2)/(2*lamda)}
      Ga = {-cosTheta*hf*hfx, 0}
      da = {1, 0, 0, 1}
    zflx1: ZeroFluxBoundary "Zero Flux 1" (default)
    init1: init "Initial Values 1" (default) | hf = hf0(x); hm = hm0(x)
    dir1: DirichletBoundary "Dirichlet Boundary Condition 1" on boundaries 1
      r = {1-epsilon, 1}
      useDirichletCondition = {1, 0}
    flux1: FluxBoundary "Flux/Source 1" on boundaries 2 | g = {0, 0}; q = {sinTheta, 0, 0, 0}

Mesh
  mesh1 "Mesh 1"
    size: MeshSizeDefault | hmax = 0.005; custom = on
    auto_f1: Edge on remaining entities

Studies
  std1 "Study 1"
    time: Transient "Time Dependent" | tlist = range(0,10,200)

Solver configurations
  sol1 "Solution 1" (study std1)
    v1: Variables "Dependent Variables 1"
    t1: Time "Time-Dependent Solver 1" | tlist = range(0,10,200); maxstepbdf = 0.01
      dDef: Direct
      fc1: FullyCoupled | linsolver = dDef

Datasets
  dset1: Solution | solution = sol1
  cpt1: CutPoint1D "hydrograph" | data = dset1; pointx = 6

Derived values
  pev1: EvalPoint "flux" on boundaries 1 | data = dset1; table = tbl1; expr = -(1-epsilon)*(hfx+tanTheta); unit = 1/m
  pev2: EvalPoint "hydrograph"
    data = cpt1
    table = tbl2
    expr = {hf, hm, hfx}
    descr = {, , "Gradient of hf, x component"}

Tables
  tbl1: Table "flux"
    // Point Evaluation 1
    Time (s) | -(1-epsilon)*(hfx+tanTheta) (1/m), Point: 1
    0 | -1.73672
    10 | -0.00420955
    20 | -0.00383316
    30 | -0.00349174
    40 | -0.00318184
    50 | -0.00290036
    60 | -0.00264454
    70 | -0.00241192
    80 | -0.0022003
    90 | -0.00200768
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  tbl2: Table "hydrograph"
    // hydrograph_middle
    Time (s) | hf (1), Point: 6 | hm (1), Point: 6 | Gradient of hf, x component (1/m), Point: 6
    0 | nan | nan | nan
    10 | nan | nan | nan
    20 | nan | nan | nan
    30 | nan | nan | nan
    40 | nan | nan | nan
    50 | nan | nan | nan
    60 | nan | nan | nan
    70 | nan | nan | nan
    80 | nan | nan | nan
    90 | nan | nan | nan
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
Plots
  pg1: PlotGroup1D "1D Plot Group 1" | data = dset1
    lngr1: LineGraph on all domains | expr = hf; xdata = expr; xdataexpr = x
    lngr2: LineGraph on all domains | expr = hm; descr = Dependent variable hm

Exports
  data1: Data
    data = dset1
    expr = {hf, hm, hfx}
    unit = {1, 1, 1/m}
    descr = {Dependent variable hf, Dependent variable hm, "Gradient of hf, x component"}
    filename = C:\Users\User\OneDrive - Democritus University of Thrace\Slope\COMSOL\Case_DP15.csv